*Heading
Thick cylinder template
*Node
1, 50.0, 0.0, 0.0
2, 100.0, 0.0, 0.0
3, 100.0, 10.0, 0.0
4, 50.0, 10.0, 0.0
*Element, type=CAX4R, elset=ALL
1, 1, 2, 3, 4
*Material, name=Steel
*Elastic
210000.0, 0.3
*Solid Section, elset=ALL, material=Steel
*Assembly, name=Assembly
*Instance, name=Cyl-1, part=Cylinder
*End Instance
*End Assembly
*Step, name=Step-1, nlgeom=NO
*Static
1.0, 1.0, 1e-5, 1.0
*End Step
