*Heading
Steady thermal conduction
*Node
1, 0.0, 0.0, 0.0
2, 100.0, 0.0, 0.0
3, 100.0, 50.0, 0.0
4, 0.0, 50.0, 0.0
5, 0.0, 0.0, 10.0
6, 100.0, 0.0, 10.0
7, 100.0, 50.0, 10.0
8, 0.0, 50.0, 10.0
*Element, type=DC3D8, elset=ALL
1, 1, 2, 3, 4, 5, 6, 7, 8
*Material, name=Steel
*Conductivity
50.0
*Solid Section, elset=ALL, material=Steel
*Assembly, name=Assembly
*Instance, name=Plate-1, part=Plate
*End Instance
*End Assembly
*Step, name=Step-1
*Heat Transfer, steady state
1.0, 1.0
*End Step
