/FILNAME,torsion
/PREP7
ET,1,SOLID185
MP,EX,1,210000
MP,PRXY,1,0.3
CYL4,0,0,5, , ,100
ESIZE,2
VMESH,ALL
FINISH
/SOLU
ANTYPE,0
SOLVE
FINISH
/POST1
SET,LAST
*GET,MAX_MISES,NODE,,S,EQV
*GET,MAX_ROT,NODE,,ROT,X
*CFOPEN,results,txt
*VWRITE,MAX_MISES,MAX_ROT
(F12.4,',',F12.6)
*CFCLOS
FINISH
/EXIT
