/FILNAME,buckle
/PREP7
ET,1,SHELL181
MP,EX,1,210000
MP,PRXY,1,0.3
RECTNG,0,100,0,100
ESIZE,5
AMESH,ALL
SECTYPE,1,SHELL
SECDATA,1
FINISH
/SOLU
ANTYPE,0
SOLVE
FINISH
/POST1
SET,FIRST
*GET,EIG1,MODE,1,FREQ
*CFOPEN,results,txt
*VWRITE,EIG1
(F12.4)
*CFCLOS
FINISH
/EXIT
