/FILNAME,transient_thermal
/PREP7
ET,1,SOLID70
MP,KXX,1,50
MP,C,1,460000000
MP,DENS,1,7.85e-9
RECTNG,0,20,0,50
ESIZE,2
AMESH,ALL
FINISH
/SOLU
ANTYPE,4
TRNOPT,FULL
TIME,10
SOLVE
FINISH
/POST1
SET, , , , , , ,10
*GET,TSURF,NODE,1,TEMP
*GET,T5,NODE,5,TEMP
*CFOPEN,results,txt
*VWRITE,TSURF,T5
(F12.4,',',F12.4)
*CFCLOS
FINISH
/EXIT
