/FILNAME,thermal_structural
/PREP7
ET,1,SOLID70
MP,KXX,1,50
RECTNG,0,100,0,10
ESIZE,5
AMESH,ALL
FINISH
/SOLU
ANTYPE,0
D,ALL,TEMP,100
D,ALL,TEMP,20
SOLVE
FINISH
/POST1
SET,LAST
*GET,MAXTEMP,NODE,,TEMP,MAX
*CFOPEN,thermal_results,txt
*VWRITE,MAXTEMP
(F12.4)
*CFCLOS
FINISH
/EXIT
