*Heading
Cylindrical transform test - CalculiX
*Node
1, 50.0, 0.0, 0.0
2, 100.0, 0.0, 0.0
3, 100.0, 10.0, 0.0
4, 50.0, 10.0, 0.0
*Element, type=CAX4, elset=All_Elements
1, 1, 2, 3, 4
*Material, name=Steel
*Elastic
210000.0, 0.3
*Solid Section, elset=All_Elements, material=Steel
*Step
*Static
*Node File
U
*El File
S, E
*End Step
