*Heading
Steady state dynamics - CalculiX
*Node
1, 0.0, 0.0, 0.0
2, 500.0, 0.0, 0.0
3, 500.0, 10.0, 0.0
4, 0.0, 10.0, 0.0
5, 0.0, 0.0, 10.0
6, 500.0, 0.0, 10.0
7, 500.0, 10.0, 10.0
8, 0.0, 10.0, 10.0
*Element, type=C3D8R, elset=All_Elements
1, 1, 2, 3, 4, 5, 6, 7, 8
*Material, name=Steel
*Elastic
210000.0, 0.3
*Density
7.85e-9
*Solid Section, elset=All_Elements, material=Steel
*Boundary
1, 1, 3, 0.0
4, 1, 3, 0.0
5, 1, 3, 0.0
8, 1, 3, 0.0
*Step
*Frequency
5
*Node File
U
*End Step
