*Restart, read
*Step
*Static
*Boundary
1, 1, 3, 0.0
4, 1, 3, 0.0
5, 1, 3, 0.0
8, 1, 3, 0.0
*Cload
2, 2, -200.0
*Node Print, nset=Nall, frequency=999
U
*El Print, elset=Eall, frequency=999
S
*End Step
