*Heading
Rectangular beam - CalculiX section test
*Node
1, 0.0, 0.0, 0.0
2, 100.0, 0.0, 0.0
3, 50.0, 0.0, 0.0
*Element, type=B32, elset=Beam_Elements
1, 1, 3, 2
*Nset, nset=ALLNODES
1,2,3
*Material, name=Steel
*Elastic
210000.0, 0.3
*Beam Section, elset=Beam_Elements, material=Steel, section=RECT
10.0, 10.0
*Step
*Static
*Boundary
1,1,6
*Cload
2,2,-100.0
*Node Print, NSET=ALLNODES
U
*El Print, ELSET=Beam_Elements
S
*Node File
U
*El File
S, E
*End Step
