*Heading
Rectangular beam - CalculiX section test
*Node
1, 0.0, 0.0, 0.0
2, 100.0, 0.0, 0.0
*Element, type=B32, elset=Beam_Elements
1, 1, 2
*Material, name=Steel
*Elastic
210000.0, 0.3
*Beam Section, elset=Beam_Elements, material=Steel, section=RECT
10.0, 10.0
*Step
*Static
*Node File
U
*El File
S, E
*End Step
