*Heading
Composite laminate - CalculiX shell test
*Node
1, 0.0, 0.0, 0.0
2, 100.0, 0.0, 0.0
3, 100.0, 100.0, 0.0
4, 0.0, 100.0, 0.0
*Element, type=S8R, elset=Plate_Elements
1, 1, 2, 3, 4
*Material, name=Carbon
*Elastic, type=ORTHO
140000.0, 10000.0, 10000.0, 0.3, 0.3, 0.3, 5000.0, 5000.0
5000.0
*Step
*Static
*Node File
U
*El File
S, E
*End Step
