*Heading
Rigid body style coupling - CalculiX (task03)
*Node
1, 0.0, 0.0, 0.0
2, 100.0, 0.0, 0.0
3, 100.0, 10.0, 0.0
4, 0.0, 10.0, 0.0
5, 0.0, 0.0, 10.0
6, 100.0, 0.0, 10.0
7, 100.0, 10.0, 10.0
8, 0.0, 10.0, 10.0
9, 50.0, 5.0, 5.0
*Element, type=C3D8R, elset=All_Elements
1, 1, 2, 3, 4, 5, 6, 7, 8
*Material, name=Steel
*Elastic
210000.0, 0.3
*Solid Section, elset=All_Elements, material=Steel
*Nset, nset=RefNode
9
*Nset, nset=BodyNodes
1,2,3,4,5,6,7,8
*Nset, nset=AllPrint
1,2,3,4,5,6,7,8,9
*Coupling, constraint name=Cpl-1, ref node=9, surface=BodySurf
*Kinematic
*Surface, name=BodySurf, type=ELEMENT
1,S1
1,S2
1,S3
1,S4
1,S5
1,S6
*Step
*Static
*Boundary
1,1,3,0.0
*Cload
9,2,-100.0
*Node Print, NSET=AllPrint
U
*El Print, ELSET=All_Elements
S
*End Step
