*Heading
Tie constraint test - CalculiX
*Node
1, 0.0, 0.0, 0.0
2, 50.0, 0.0, 0.0
3, 50.0, 10.0, 0.0
4, 0.0, 10.0, 0.0
5, 0.0, 0.0, 10.0
6, 50.0, 0.0, 10.0
7, 50.0, 10.0, 10.0
8, 0.0, 10.0, 10.0
101, 50.0, 0.0, 0.0
102, 100.0, 0.0, 0.0
103, 100.0, 10.0, 0.0
104, 50.0, 10.0, 0.0
105, 50.0, 0.0, 10.0
106, 100.0, 0.0, 10.0
107, 100.0, 10.0, 10.0
108, 50.0, 10.0, 10.0
*Element, type=C3D8R, elset=Part_A
1, 1, 2, 3, 4, 5, 6, 7, 8
*Element, type=C3D8R, elset=Part_B
2, 101, 102, 103, 104, 105, 106, 107, 108
*Material, name=Steel
*Elastic
210000.0, 0.3
*Solid Section, elset=Part_A, material=Steel
*Solid Section, elset=Part_B, material=Steel
*Step
*Static
*Node File
U
*El File
S, E
*End Step
