*Heading
Implicit dynamic test - revised feasible deck
*Node
1, 0.0, 0.0, 0.0
2, 100.0, 0.0, 0.0
3, 100.0, 10.0, 0.0
4, 0.0, 10.0, 0.0
5, 0.0, 0.0, 10.0
6, 100.0, 0.0, 10.0
7, 100.0, 10.0, 10.0
8, 0.0, 10.0, 10.0
*Element, type=C3D8, elset=All_Elements
1, 1, 2, 3, 4, 5, 6, 7, 8
*Nset, nset=FIX
1, 4, 5, 8
*Nset, nset=TIP
2
*Material, name=Steel
*Elastic
210000.0, 0.3
*Density
7.85e-9
*Solid Section, elset=All_Elements, material=Steel
*Amplitude, name=Amp-1
0.0, 0.0, 0.01, 1.0
*Step
*Dynamic
0.005, 0.01
*Boundary
FIX, 1, 3, 0.0
*Cload, amplitude=Amp-1
2, 2, -100.0
*Node Print, nset=TIP, frequency=1
U
*End Step
