*Heading
Cyclic symmetry - CalculiX
*Node
1, 50.0, 0.0, 0.0
2, 100.0, 0.0, 0.0
3, 100.0, 10.0, 0.0
4, 50.0, 10.0, 0.0
*Element, type=C3D8R, elset=Sector
1, 1, 2, 3, 4, 5, 6, 7, 8
*Material, name=Steel
*Elastic
210000.0, 0.3
*Solid Section, elset=Sector, material=Steel
*Step
*Static
*Node File
U
*End Step
