*Heading
Thermal BC test - CalculiX (task11)
*Node
1, 0.0, 0.0, 0.0
2, 100.0, 0.0, 0.0
3, 100.0, 50.0, 0.0
4, 0.0, 50.0, 0.0
5, 0.0, 0.0, 10.0
6, 100.0, 0.0, 10.0
7, 100.0, 50.0, 10.0
8, 0.0, 50.0, 10.0
*Element, type=DC3D8, elset=All_Elements
1, 1, 2, 3, 4, 5, 6, 7, 8
*Material, name=Steel
*Conductivity
50.0
*Solid Section, elset=All_Elements, material=Steel
*Nset,NSET=LeftNodes
1,4,5,8
*Nset,NSET=RightNodes
2,3,6,7
*Nset,NSET=TopNodes
5,6,7,8
*Nset,NSET=CenterNode
7
*Step
*Heat Transfer, steady state
*Boundary
LeftNodes,11,11,100.
*Film
1,F2,20.,0.1
*Cflux
TopNodes,11,5e-4
*Node Print,NSET=RightNodes
NT
*Node Print,NSET=CenterNode
NT
*End Step
