*Heading
Thermal BC test - CalculiX
*Node
1, 0.0, 0.0, 0.0
2, 100.0, 0.0, 0.0
3, 100.0, 50.0, 0.0
4, 0.0, 50.0, 0.0
5, 0.0, 0.0, 10.0
6, 100.0, 0.0, 10.0
7, 100.0, 50.0, 10.0
8, 0.0, 50.0, 10.0
*Element, type=DC3D8, elset=All_Elements
1, 1, 2, 3, 4, 5, 6, 7, 8
*Material, name=Steel
*Conductivity
50.0
*Solid Section, elset=All_Elements, material=Steel
*Step
*Heat Transfer, steady state
*Node File
NT
*End Step
