*Heading
MPC beam-solid connection - CalculiX (task13)
*Node
1, 0.0, 0.0, 0.0
2, 50.0, 0.0, 0.0
3, 50.0, 10.0, 0.0
4, 0.0, 10.0, 0.0
5, 0.0, 0.0, 10.0
6, 50.0, 0.0, 10.0
7, 50.0, 10.0, 10.0
8, 0.0, 10.0, 10.0
101, 50.0, 5.0, 5.0
102, 100.0, 5.0, 5.0
*Element, type=C3D8R, elset=Solid_Part
1, 1, 2, 3, 4, 5, 6, 7, 8
*Element, type=B31, elset=Beam_Part
2, 101, 102
*Material, name=Steel
*Elastic
210000.0, 0.3
*Solid Section, elset=Solid_Part, material=Steel
*Beam Section, elset=Beam_Part, material=Steel, section=RECT
10.0, 10.0
*Nset, nset=SolidFace
2,3,6,7
*Nset, nset=AllNodesPrint
1,2,3,4,5,6,7,8,101,102
*Boundary
1, 1, 3, 0.0
4, 1, 3, 0.0
5, 1, 3, 0.0
8, 1, 3, 0.0
*Equation
2
101,1,1.0,2,1,-1.0
*Equation
2
101,3,1.0,2,3,-1.0
*Equation
5
101,2,1.0,2,2,-0.25,3,2,-0.25,6,2,-0.25,7,2,-0.25
*Step
*Static
*Cload
102,2,-100.0
*Node Print, NSET=SolidFace
U
*Node Print, NSET=AllNodesPrint
U
*El Print, ELSET=Solid_Part
S
*End Step
