*Heading
Anisotropic material - CalculiX (task15)
*Node
1, 0.0, 0.0, 0.0
2, 100.0, 0.0, 0.0
3, 100.0, 10.0, 0.0
4, 0.0, 10.0, 0.0
5, 0.0, 0.0, 10.0
6, 100.0, 0.0, 10.0
7, 100.0, 10.0, 10.0
8, 0.0, 10.0, 10.0
*Element, type=C3D8R, elset=All_Elements
1, 1, 2, 3, 4, 5, 6, 7, 8
*Material, name=Fiber
*Elastic, type=ORTHO
140000.0, 10000.0, 10000.0, 0.3, 0.3, 0.3, 5000.0, 5000.0
5000.0
*Orientation, name=Ori-1
1.,0.,0., 0.,1.,0.
*Solid Section, elset=All_Elements, material=Fiber, orientation=Ori-1
*Nset, nset=FixNodes
1,4,5,8
*Nset, nset=AllNodesPrint
1,2,3,4,5,6,7,8
*Step
*Static
*Boundary
FixNodes,1,3,0.
*Cload
2,2,-100.0
*Node Print, NSET=AllNodesPrint
U
*El Print, ELSET=All_Elements
S
*End Step
