*Heading
Anisotropic hyperelastic - CalculiX
*Node
1, 0.0, 0.0, 0.0
2, 100.0, 0.0, 0.0
3, 100.0, 10.0, 0.0
4, 0.0, 10.0, 0.0
5, 0.0, 0.0, 10.0
6, 100.0, 0.0, 10.0
7, 100.0, 10.0, 10.0
8, 0.0, 10.0, 10.0
*Element, type=C3D8R, elset=All_Elements
1, 1, 2, 3, 4, 5, 6, 7, 8
*Material, name=Fiber
*Elastic, type=ORTHO
140000.0, 10000.0, 10000.0, 0.3, 0.3, 0.3, 5000.0, 5000.0
5000.0
*Solid Section, elset=All_Elements, material=Fiber
*Step
*Static
*Node File
U
*El File
S, E
*End Step
