*Heading
 CLI task-03 shell plate with a central hole under edge tension
** Job name: Job-FlangeHole Model name: Model-FlangeHole
** Generated by: Abaqus/CAE Learning Edition 2025
*Preprint, echo=NO, model=NO, history=NO, contact=NO
**
** PARTS
**
*Part, name=FlangeHolePlate
*Node
      1,   65.5432739,   122.296097,           0.
      2,   62.2961006,   125.543274,           0.
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*Element, type=S3
 1, 158, 124, 146
 2, 573, 152, 122
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*Element, type=S4R
 23, 125, 119, 126, 144
 24,  10,   9,  97, 112
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*Nset, nset=LEFT_EDGE
 14, 16, 66, 67, 68, 69
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*Elset, elset=LEFT_EDGE
  71,  72,  81,  85,  96,  97
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*Nset, nset=RIGHT_EDGE
 13, 15, 32, 33, 34, 35
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*Elset, elset=RIGHT_EDGE
  43,  44,  52,  55,  68,  69
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*Nset, nset=HOLE_EDGE
  1,  2,  3,  4,  5,  6,  7,  8,  9, 10, 11, 12, 17, 18, 19, 20
*Elset, elset=HOLE_EDGE
  24,  26,  30,  31,  34,  35,  37,  38,  39,  40,  41,  42,  99, 100, 103, 104
*Nset, nset=BOTTOM_LEFT
 14,
*Nset, nset=BOTTOM_RIGHT
 13,
*Nset, nset=TOP_LEFT
 16,
*Nset, nset=PLATE_REGION, generate
   1,  638,    1
*Elset, elset=PLATE_REGION, generate
   1,  605,    1
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*Elset, elset=HOLE_ADJACENT_ELEMENTS
  24,  26,  29,  30,  31,  34
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*Elset, elset=_LEFT_EDGE_SURFACE_E2, internal
  71,  72,  96, 259, 331, 357, 359, 371, 372, 373, 378, 379
*Elset, elset=_LEFT_EDGE_SURFACE_E4, internal
  81,  85,  97,  98, 283, 297, 304, 305, 307, 309, 316, 342
*Surface, type=ELEMENT, name=LEFT_EDGE_SURFACE
_LEFT_EDGE_SURFACE_E2, E2
_LEFT_EDGE_SURFACE_E4, E4
*Elset, elset=_RIGHT_EDGE_SURFACE_E2, internal
  43,  44,  55,  68, 321, 329, 345, 348, 374, 375, 376, 377, 380, 381
*Elset, elset=_RIGHT_EDGE_SURFACE_E1, internal
 52,
*Elset, elset=_RIGHT_EDGE_SURFACE_E4, internal
  69,  70, 261, 303, 306, 312, 314, 347, 356
*Surface, type=ELEMENT, name=RIGHT_EDGE_SURFACE
_RIGHT_EDGE_SURFACE_E2, E2
_RIGHT_EDGE_SURFACE_E1, E1
_RIGHT_EDGE_SURFACE_E4, E4
** Section: Plate-Section
*Shell Section, elset=PLATE_REGION, material=Steel
1., 5
*End Part
**
**
** ASSEMBLY
**
*Assembly, name=Assembly
**
*Instance, name=PLATE-1, part=FlangeHolePlate
*End Instance
**
*End Assembly
**
** MATERIALS
**
*Material, name=Steel
*Elastic
210000., 0.3
**
** BOUNDARY CONDITIONS
**
** Name: BC-BottomLeft Type: Displacement/Rotation
*Boundary
PLATE-1.BOTTOM_LEFT, 1, 1
PLATE-1.BOTTOM_LEFT, 2, 2
PLATE-1.BOTTOM_LEFT, 3, 3
** Name: BC-BottomRight Type: Displacement/Rotation
*Boundary
PLATE-1.BOTTOM_RIGHT, 2, 2
PLATE-1.BOTTOM_RIGHT, 3, 3
** Name: BC-TopLeft Type: Displacement/Rotation
*Boundary
PLATE-1.TOP_LEFT, 3, 3
** ----------------------------------------------------------------
**
** STEP: Step-HoleTension
**
*Step, name=Step-HoleTension, nlgeom=NO
*Static
1., 1., 1e-05, 1.
**
** LOADS
**
** Name: Load-Left   Type: Shell edge load
*Dsload, follower=NO
PLATE-1.LEFT_EDGE_SURFACE, EDLD, 8., -1., 0., 0.
** Name: Load-Right   Type: Shell edge load
*Dsload, follower=NO
PLATE-1.RIGHT_EDGE_SURFACE, EDLD, 8., 1., 0., 0.
**
** OUTPUT REQUESTS
**
*Restart, write, frequency=0
**
** FIELD OUTPUT: F-Output-Task03
**
*Output, field
*Node Output
RF, U
*Element Output, directions=YES
1, 2, 3, 4, 5
S,
**
** HISTORY OUTPUT: H-Output-1
**
*Output, history, variable=PRESELECT
*End Step
