*Heading
Thermal stress analysis
*Node
1, 0.0, 0.0, 0.0
2, 100.0, 0.0, 0.0
3, 100.0, 10.0, 0.0
4, 0.0, 10.0, 0.0
5, 0.0, 0.0, 10.0
6, 100.0, 0.0, 10.0
7, 100.0, 10.0, 10.0
8, 0.0, 10.0, 10.0
*Element, type=C3D8R, elset=ALL
1, 1, 2, 3, 4, 5, 6, 7, 8
*Material, name=Steel
*Elastic
210000.0, 0.3
*Expansion
1.2e-5
*Solid Section, elset=ALL, material=Steel
*Assembly, name=Assembly
*Instance, name=Bar-1, part=Bar
*End Instance
*End Assembly
*Temperature
ALL_NODES, 100.0
*Step, name=Step-Thermal, nlgeom=NO
*Static
1.0, 1.0, 1e-5, 1.0
*End Step
