*Heading
Buckling template
*Node
1, 0.0, 0.0, 0.0
2, 100.0, 0.0, 0.0
3, 100.0, 100.0, 0.0
4, 0.0, 100.0, 0.0
*Element, type=S4R, elset=ALL
1, 1, 2, 3, 4
*Shell Section, elset=ALL, material=Steel, thickness=1.0
*Assembly, name=Assembly
*Instance, name=Plate-1, part=Plate
*End Instance
*End Assembly
*Step, name=Step-1
*Frequency, eigensolver=Lanczos
3, , , , ,
*End Step
