*Heading
Circular plate template
*Node
1, 0.0, 0.0, 0.0
2, 50.0, 0.0, 0.0
3, 50.0, 1.0, 0.0
4, 0.0, 1.0, 0.0
*Element, type=SAX1, elset=ALL
1, 1, 2, 3, 4
*Shell Section, elset=ALL, material=Steel, thickness=1.0
*Assembly, name=Assembly
*Instance, name=Plate-1, part=Plate
*End Instance
*End Assembly
*Step, name=Step-1, nlgeom=NO
*Static
1.0, 1.0, 1e-5, 1.0
*End Step
