/FILNAME,cylinder
/PREP7
ET,1,PLANE183, , ,1
MP,EX,1,210000
MP,PRXY,1,0.3
RECTNG,50,100,0,10
ESIZE,5
AMESH,ALL
FINISH
/SOLU
ANTYPE,0
SOLVE
FINISH
/POST1
SET,LAST
*GET,MISES_INNER,NODE,1,S,EQV
*GET,MISES_OUTER,NODE,3,S,EQV
*CFOPEN,results,txt
*VWRITE,MISES_INNER,MISES_OUTER
(F12.4,',',F12.4)
*CFCLOS
FINISH
/EXIT
