/FILNAME,plate_hole
/PREP7
ET,1,PLANE183, , ,0
MP,EX,1,210000
MP,PRXY,1,0.3
RECTNG,0,100,0,200
ESIZE,5
AMESH,ALL
FINISH
/SOLU
ANTYPE,0
SOLVE
FINISH
/POST1
SET,LAST
*GET,MAX_MISES,NODE,,S,EQV
*GET,AVG_MISES,NODE,,S,EQV
*CFOPEN,results,txt
*VWRITE,MAX_MISES,AVG_MISES
(F12.4,',',F12.4)
*CFCLOS
FINISH
/EXIT
