/FILNAME,modal
/PREP7
ET,1,BEAM188
SECTYPE,1,BEAM,RECT
SECDATA,10,10
MP,EX,1,210000
MP,PRXY,1,0.3
K,1,0,0,0
K,2,500,0,0
L,1,2
LESIZE,ALL,,,50
LMESH,ALL
FINISH
/SOLU
ANTYPE,2
MODOPT,LANB,3
SOLVE
FINISH
/POST1
SET,FIRST
*GET,F1,MODE,1,FREQ
SET,,,2
*GET,F2,MODE,2,FREQ
SET,,,3
*GET,F3,MODE,3,FREQ
*CFOPEN,results,txt
*VWRITE,F1,F2,F3
(F12.4,',',F12.4,',',F12.4)
*CFCLOS
FINISH
/EXIT
