/FILNAME,steady_thermal
/PREP7
ET,1,SOLID70
MP,KXX,1,50
RECTNG,0,100,0,50
ESIZE,5
AMESH,ALL
FINISH
/SOLU
ANTYPE,0
SOLVE
FINISH
/POST1
SET,LAST
*GET,T25,NODE,25,TEMP
*GET,T50,NODE,50,TEMP
*CFOPEN,results,txt
*VWRITE,T25,T50
(F12.4,',',F12.4)
*CFCLOS
FINISH
/EXIT
