/FILNAME,broken
/PREP7
ET,1,BEAM188
SECTYPE,1,BEAM,RECT
SECDATA,10,10
MP,EX,1,210000
MP,PRXY,1,0.3
K,1,0,0,0
K,2,100,0,0
L,1,2
LESIZE,ALL,,,10
LMESH,ALL
FINISH
/SOLU
ANTYPE,0
DK,1,ALL,0
DK,1,ALL,0
FK,2,FY,-100
SOLVE
FINISH
/POST1
SET,LAST
*GET,MAX_MISES,NODE,,S,EQV
*GET,MAX_U,NODE,,U,Y
*CFOPEN,results,txt
*VWRITE,MAX_MISES,MAX_U
(F12.4,',',F12.6)
*CFCLOS
FINISH
/EXIT
