*Heading
Cyclic sector annulus - revised feasible deck
*Node
1, 50.0,   0.0,   0.0
2,100.0,   0.0,   0.0
3,  0.0, 100.0,   0.0
4,  0.0,  50.0,   0.0
5, 50.0,   0.0,  10.0
6,100.0,   0.0,  10.0
7,  0.0, 100.0,  10.0
8,  0.0,  50.0,  10.0
*Element, type=C3D8, elset=Sector
1, 1, 2, 3, 4, 5, 6, 7, 8
*Nset, nset=NLEFT
1, 2, 5, 6
*Nset, nset=NRIGHT
4, 3, 8, 7
*Surface, name=SLEFT, type=NODE
NLEFT
*Surface, name=SRIGHT, type=NODE
NRIGHT
*Tie, cyclic symmetry, name=CYC1
SRIGHT, SLEFT
*Cyclic Symmetry Model, N=4, NGRAPH=1, TIE=CYC1
0., 0., 0., 0., 0., 1.
*Material, name=Steel
*Elastic
210000.0, 0.3
*Solid Section, elset=Sector, material=Steel
*Step
*Static
*Boundary
1, 3, 3, 0.0
*Dload
1, P4, 10.0
*Node Print, nset=NLEFT
U
*El Print, elset=Sector
S
*End Step
