*Heading
Gravity load - CalculiX (task17)
*Node
1, 0.0, 0.0, 0.0
2, 100.0, 0.0, 0.0
3, 100.0, 10.0, 0.0
4, 0.0, 10.0, 0.0
5, 0.0, 0.0, 10.0
6, 100.0, 0.0, 10.0
7, 100.0, 10.0, 10.0
8, 0.0, 10.0, 10.0
*Element, type=C3D8R, elset=All_Elements
1, 1, 2, 3, 4, 5, 6, 7, 8
*Material, name=Steel
*Elastic
210000.0, 0.3
*Density
7.85e-9
*Solid Section, elset=All_Elements, material=Steel
*Nset, nset=FixNodes
1,4,5,8
*Nset, nset=TipNodes
2,3,6,7
*Step
*Static
*Boundary
FixNodes,1,3,0.
*Dload
All_Elements,GRAV,9810.,0.,-1.,0.
*Node Print, NSET=TipNodes
U
*El Print, ELSET=All_Elements
S
*End Step
